<Lems>
    <iaf3 extends="iaf1"/>

    <Dimension name="voltage" m="1" l="2" t="-3" i="-1" />
    <Dimension name="time" t="1" />
    <Dimension name="per_time" t="-1" />
    <Dimension name="conductance" m="-1" l="-2" t="3" i="2" />
    <Dimension name="capacitance" m="-1" l="-2" t="4" i="2" />
    <Dimension name="current" i="1" />

    <ComponentType name="iaf1">
        <Parameter name="threshold" dimension="voltage" />
        <Parameter name="refractoryPeriod" dimension="time" />
        <Parameter name="capacitance" dimension="capacitance" />
    </ComponentType>

    <ComponentType name="iaf3" extends="iaf1">
        <Parameter name="leakConductance" dimension="conductance" />
        <Parameter name="leakReversal" dimension="voltage" />
        <Parameter name="deltaV" dimension="voltage" />

        <Dynamics>
            <StateVariable name="v" exposure="v" dimension="voltage" />
            <TimeDerivative variable="v" value="leakConductance * (leakReversal - v) / capacitance" />
        </Dynamics>
    </ComponentType>

    <Unit symbol="mV" dimension="voltage" power="-3" />
    <Unit symbol="ms" dimension="time" power="-3" />
    <Unit symbol="pS" dimension="conductance" power="-12" />
    <Unit symbol="nS" dimension="conductance" power="-9" />
    <Unit symbol="uF" dimension="capacitance" power="-6" />
    <Unit symbol="nF" dimension="capacitance" power="-9" />
    <Unit symbol="pF" dimension="capacitance" power="-12" />
    <Unit symbol="per_ms" dimension="per_time" power="3" />
    <Unit symbol="pA" dimension="current" power="-12" />
</Lems>
