<neuroml xmlns="http://www.neuroml.org/schema/neuroml2"
    xmlns:xsi="http://www.w3.org/2001/XMLSchema-instance"
      xsi:schemaLocation="http://www.neuroml.org/schema/neuroml2 ../Schemas/NeuroML2/NeuroML_v2beta4.xsd"
    id="conc-models">

  <decayingPoolConcentrationModel id="dpcm" ion="na" restingConc="42" decayConstant="23" shellThickness="7" />
  <fixedFactorConcentrationModel id="ffcm" ion="na" restingConc="42" decayConstant="23" rho="7" />
</neuroml>
