<?xml version="1.0" encoding="UTF-8"?>

<neuroml xmlns="http://www.neuroml.org/schema/neuroml2"
         xmlns:xsi="http://www.w3.org/2001/XMLSchema-instance"
         xsi:schemaLocation="http://www.neuroml.org/schema/neuroml2  ../Schemas/NeuroML2/NeuroML_v2beta4.xsd"
         id="NML2_SimpleIonChannel">

    <ionChannelHH id="NaConductance" conductance="10pS" species="na">
        <gateHHrates id="m" instances="3">
            <forwardRate type="HHExpRate" rate="1per_ms" midpoint="-40mV" scale="10mV"/>
            <reverseRate type="HHExpRate" rate="4per_ms" midpoint="-65mV" scale="-18mV"/>
        </gateHHrates>
    </ionChannelHH>
</neuroml>
